Given
M1*V1 + M2*V2 == M1*U1 + M2*U2
U1 - U2 == -k(V1 - V2)
Find(U1, U2) → [(M1*V1 - M2*k(V1 - V2) + M2*V2)/(M1 + M2); (M1*k(V1 - V2) + M1*V1 + M2*V2)/(M1 + M2)]
Given
dp == (v + a*t/2)*t
Find(t) → [2*(sqrt(v^2 + 2*a*dp)/2 - v/2)/a, -2*(v/2 + sqrt(v^2 + 2*a*dp)/2)/a]
