x == dposx + dv0x*t
y == dposy + dv0y*t
x^2 + y^2 == (R + r)^2
(dposx + dv0x*t)^2 + (dposy + dv0y*t)^2 - (R + r)^2 collect, t → (dv0x^2 + dv0y^2)*t^2 + (2*dv0x*dposx + 2*dv0y*dposy)*t + dposx^2 - (R + r)^2 + dposy^2
