Given
y == k*x + b
(x - x0)^2 + (y - y0)^2 == R^2
Find(x, y) → [
    -(b - (b + k^2*y0 + k*x0 + k*sqrt(R^2*k^2 + R^2 - b^2 - 2*b*k*x0 + 2*b*y0 - k^2*x0^2 + 2*k*x0*y0 - y0^2))/(k^2 + 1))/k, -(b - (b + k^2*y0 + k*x0 - k*sqrt(R^2*k^2 + R^2 - b^2 - 2*b*k*x0 + 2*b*y0 - k^2*x0^2 + 2*k*x0*y0 - y0^2))/(k^2 + 1))/k;
    (b + k^2*y0 + k*x0 + k*sqrt(R^2*k^2 + R^2 - b^2 - 2*b*k*x0 + 2*b*y0 - k^2*x0^2 + 2*k*x0*y0 - y0^2))/(k^2 + 1), (b + k^2*y0 + k*x0 - k*sqrt(R^2*k^2 + R^2 - b^2 - 2*b*k*x0 + 2*b*y0 - k^2*x0^2 + 2*k*x0*y0 - y0^2))/(k^2 + 1)
] simplify → [
    (x0 - b*k + k*y0)/(k^2 + 1) + sqrt(R^2*k^2 + R^2 - b^2 - 2*b*k*x0 + 2*b*y0 - k^2*x0^2 + 2*k*x0*y0 - y0^2)/(k^2 + 1), (x0 - b*k + k*y0)/(k^2 + 1) - sqrt(R^2*k^2 + R^2 - b^2 - 2*b*k*x0 + 2*b*y0 - k^2*x0^2 + 2*k*x0*y0 - y0^2)/(k^2 + 1);
    (y0*k^2 + x0*k + b)/(k^2 + 1) + k*sqrt(R^2*k^2 + R^2 - b^2 - 2*b*k*x0 + 2*b*y0 - k^2*x0^2 + 2*k*x0*y0 - y0^2)/(k^2 + 1), (y0*k^2 + x0*k + b)/(k^2 + 1) - k*sqrt(R^2*k^2 + R^2 - b^2 - 2*b*k*x0 + 2*b*y0 - k^2*x0^2 + 2*k*x0*y0 - y0^2)/(k^2 + 1)
]
