Given
x == v0x*t + posx + ax*t^2/2
y == v0y*t + posy + ay*t^2/2
(y - y1)/(y1 - y2) == (x - x1)/(x1 - x2)
Find(t)  # error: No solution was found.
Given
(y - y1)/(y1 - y2) == (x - x1)/(x1 - x2)
Find(y) → (x*y1 - x*y2 + x1*y2 - x2*y1)/(x1 - x2)
Given
(x*y1 - x*y2 + x1*y2 - x2*y1)/(x1 - x2) == v0y*t + posy + ay*t^2/2
Find(x) → (x1 - x2)*(posy + ay*t^2/2 - (x1*y2 - x2*y1)/(x1 - x2) + t*v0y)/(y1 - y2)
Given
(x1 - x2)*(posy + ay*t^2/2 - (x1*y2 - x2*y1)/(x1 - x2) + t*v0y)/(y1 - y2) == v0x*t + posx + ax*t^2/2
(x1 - x2)*(posy + ay*t^2/2 - (x1*y2 - x2*y1)/(x1 - x2) + t*v0y)/(y1 - y2) - (v0x*t + posx + ax*t^2/2) collect, t → (ay*(x1 - x2)/(2*(y1 - y2)) - ax/2)*t^2 + (v0y*(x1 - x2)/(y1 - y2) - v0x)*t + (posy - (x1*y2 - x2*y1)/(x1 - x2))*(x1 - x2)/(y1 - y2) - posx
(v0x*t + posx + ax*t^2/2 - y1)/(y1 - y2) - (v0y*t + posy + ay*t^2/2 - x1)/(x1 - x2) collect, t → (ax/(2*(y1 - y2)) - ay/(2*(x1 - x2)))*t^2 + (v0x/(y1 - y2) - v0y/(x1 - x2))*t + (posx - y1)/(y1 - y2) - (posy - x1)/(x1 - x2)
